// COMSOL Multiphysics 5.2.0.126 model "electrochemical_polishing.mph"
// Electrochemical Polishing
// This example illustrates the principle of electrochemical polishing. Two electrodes and an intermediate electrolyte domain make up the simplified 2D model geometry. The positive electrode has a protrusion, which represents a surface defect. The example examines how this protrusion and the surrounding electrode material are depleted over a period of time. A Deformed Geometry interface accounts for the changes in the electrode surface's geometry.
// Outline of the model tree

Parameters
  K = 1e-11[m^3/(A*s)]  // Coefficient of proportionality

Variables
  var1 "Variables 1"
    dx = x-Xg  // x-displacement
    dy = y-Yg  // y-displacement

Geometry
  geom1 "Geometry 1" (2D, length unit mm)
    r1: Rectangle | pos = {-1.4, 0}; size = {2.8, 0.4}
    c1: Circle | pos = {0, 0.6}; r = 0.3
    dif1: Difference | input = r1; input2 = c1
    fin: Finalize "Form Union"

Physics
  dg: DeformedGeometry on all domains
    fix1: FixedMesh (default)
    disp1: PrescribedMeshDisplacement (default)
    free1: FreeDeformation on domains 1
    vel1: PrescribedMeshVelocity on boundaries 1, 5 | useVx = {1, 0}
    pnmv1: PrescribedNormalMeshVelocity on boundaries 3, 4, 6, 7 | vn = -K*(-ec.nJ)
  ec: ConductiveMedia "Electric Currents" on all domains
    dependent variable V
    EquationForm.form = Stationary
    cucn1: CurrentConservation (default) | sigma_mat = userdef; sigma = 10
    ein1: ElectricInsulation (default)
    init1: init "Initial Values 1" (default)
    pot1: ElectricPotential on boundaries 3, 4, 6, 7 | V0 = 30
    gnd1: Ground on boundaries 2

Mesh
  mesh1 "Mesh 1" (physics-controlled)
    size: MeshSizeDefault | hauto = 3

Studies
  std1 "Study 1"
    time: Transient "Time Dependent" | tlist = range(0,10)

Solver configurations
  sol1 "Solution 1" (study std1)
    v1: Variables "Dependent Variables 1"
    t1: Time "Time-Dependent Solver 1" | tlist = range(0,10)
      dDef: Direct
      fc1: FullyCoupled | linsolver = dDef

Datasets
  dset1: Solution | solution = sol1

Plots
  pg1: PlotGroup2D "Electric Potential (ec)" | data = dset1
    surf1: Surface | expr = V
  pg2: PlotGroup2D "2D Plot Group 2" | data = dset1
    surf1: Surface | expr = ec.normJ
  pg3: PlotGroup2D "2D Plot Group 3" | data = dset1
    surf1: Surface | expr = dy