// COMSOL Multiphysics 5.2.0.126 model "mast_diagonal_mounting.mph"
// Stiffness Analysis of a Communication Mast's Diagonal Mounting
// This example analyzes the stiffness of a communication mast's mounting and compares the results to an ideal case. The example demonstrates how to use parameterized geometries in parametric sweeps.
// Outline of the model tree

Parameters
  h_tube = 200[mm]  // Tube height
  ro_tube = 50[mm]  // Tube outer radius
  t_tube = 10[mm]  // Tube, wall thickness
  t_plate = 10[mm]  // Plate thickness
  r_plate = 60[mm]  // Plate radius
  r_ph = 5[mm]  // Plate hole radius
  ph_dist = 65[mm]  // Plate hole distance
  t_mount = 10[mm]  // Mount thickness
  w_mount = 55[mm]  // Mount width
  r_mh = 12[mm]  // Mount hole radius
  mh_height = 70[mm]  // Mount hole distance from base
  mm_dist = 37[mm]  // Distance between mounts

Variables
  var1 "Variables 1"
    r_tube = tube_r(X)  // Tube, inner radius
    R_tube = tube_R(X)  // Tube, outer radius
    mount_i = mount_i(X)  // Mount x position, inner
    mount_o = mount_o(X)  // Mount x position, outer
    r_mh = mount_o(Y)  // Mounthole, radius
    L_tot = mount_o(Z)  // Height, mounthole center
    z_displ = mount_m(w)/8  // Mounthole z displacement
    t_mount_ac = mount_o-mount_i  // Thickness, deformed mount
    Axy_mh = t_mount_ac*2*r_mh  // xy-projected area, mounthole
    Axy_tube = pi*(R_tube^2-r_tube^2)  // Cross-section area, tube
    S_ideal = 2e11[Pa]*Axy_tube/L_tot  // Ideal stiffness value
    S = F/z_displ  // Computed stiffness value
    SR = S/S_ideal  // Stiffness ratio
    F = 30[kN]  // Applied force
    p = -(3/2)*F/(2*Axy_mh)*(1-(Y/r_mh)^2)  // Mounthole force per unit area
    fy_mh = p*nY  // Mounthole force, y component
    fz_mh = p*nZ  // Mounthole force, z component

Selections
  sel1: Explicit "Tube, r" on points 71
  sel2: Explicit "Tube, R" on points 73
  sel3: Explicit "Mount, inner" on points 59
  sel4: Explicit "Mount, outer" on points 68
  sel5: Explicit "Mount, mid level" on points 9, 13, 18, 22, 55, 59, 64, 68

Couplings
  intop1: Integration "Tube, r" on selection sel1 | opname = tube_r
  intop2: Integration "Tube, R" on selection sel2 | opname = tube_R
  intop3: Integration "Mount, inner" on selection sel3 | opname = mount_i
  intop4: Integration "Mount, outer" on selection sel4 | opname = mount_o
  intop5: Integration "Mount, mid level" on selection sel5 | opname = mount_m

Geometry
  geom1 "Geometry 1" (3D, length unit mm)
    cyl1: Cylinder
      type = surface
      axistype = z
      layername = Layer 1
      layer = t_tube
      layerside = on
      r = ro_tube
      h = h_tube
    cyl2: Cylinder | pos = {0, 0, h_tube}; type = solid; axistype = z; layerside = on; r = r_plate; h = t_plate
    sel1: ExplicitSelection "End plate" | selection = cyl2(1) domains 1; angletol = 5; selkeep = on; selshow = on
    cyl3: Cylinder | pos = {0, ph_dist/2, 0}; type = solid; axistype = z; layerside = on; r = r_ph; h = h_tube+2*t_plate
    copy1: Copy | input = cyl3; keep = on; disply = -ph_dist
    dif1: Difference | input = cyl2; input2 = copy1, cyl3; intbnd = on; regularize = on
    wp1: WorkPlane
      planetype = quick
      quickplane = yz
      quickoffsettype = distance
      offsettype = distance
      circpoint = startvertex
      genpoints = {{0, 0, 0}, {1, 0, 0}, {0, 1, 0}}
      transaxistype = z
      quickorigin = global
      quickaxis = natural
      origin = facecenter
      faceparallelaxis = s1
      edgeparallelorigin = startvertex
      edgeparallelaxis = tangent
      unite = on
      r1: Rectangle | pos = {-w_mount/2, 0}; type = solid; base = corner; layerbottom = on; size = {w_mount, mh_height}
      c1: Circle | pos = {0, mh_height}; type = solid; base = center; r = w_mount/2; angleconstr = on; angle = 360
      uni1: Union | input = c1, r1; edge = all; regularize = on
      c2: Circle | pos = {0, mh_height}; type = solid; base = center; r = r_mh; angleconstr = on; angle = 360
      dif1: Difference | input = uni1; input2 = c2; intbnd = on; regularize = on
    ext1: Extrude
      extrudefrom = workplane
      workplane = wp1
      input = wp1
      unite = on
      distance = t_mount
      crossfaces = on
      scale = {1, 1}
      polres = 50
      baseid = {0, 1, 2}
    sel2: ExplicitSelection "Mount" | selection = ext1(1) domains 1; angletol = 5; selkeep = on; selshow = on
    mov1: Move | input = ext1; displx = (mm_dist-t_mount)/2; displz = h_tube+t_plate
    copy2: Copy | input = mov1; keep = on; displx = -mm_dist
    fin: Finalize "Form Union"

Materials
  mat1: Common "Structural steel" on all domains
    def "Basic"
      relpermeability = 1
      heatcapacity = 475[J/(kg*K)]
      thermalconductivity = 44.5[W/(m*K)]
      electricconductivity = 4.032e6[S/m]
      relpermittivity = 1
      thermalexpansioncoefficient = 12.3e-6[1/K]
      density = 7850[kg/m^3]
    Enu "Young's modulus and Poisson's ratio"
      youngsmodulus = 200e9[Pa]
      poissonsratio = 0.33
    Murnaghan
      l = -3.0e11[Pa]
      m = -6.2e11[Pa]
      n = -7.2e11[Pa]
    Lame "Lamé parameters"
      lambLame = 1.5e11[Pa]
      muLame = 7.5e10[Pa]

Physics
  solid: SolidMechanics on all domains
    dependent variable u = {u, v, w}
    lemm1: LinearElasticModel "Linear Elastic Material 1" (default)
    free1: Free (default)
    init1: init "Initial Values 1" (default)
    fix1: Fixed "Fixed Constraint 1" on boundaries 8, 9, 33, 42
    bndl1: BoundaryLoad on boundaries 20, 22, 51, 53 | FperArea = {0, fy_mh, fz_mh}

Mesh
  mesh1 "Mesh 1"
    size: MeshSizeDefault | hmax = 31; hmin = 5.57; hcurve = 0.6; hnarrow = 0.5; hgrad = 1.5; hauto = 5
    ftet1: FreeTet "Free Tetrahedral 1" on selection geom1_sel2
      size1: Size on selection geom1_sel2 | hauto = 4
    ftet2: FreeTet "Free Tetrahedral 2" on selection geom1_sel1
      size1: Size on selection geom1_sel1 | hauto = 3
    swe1: Sweep "Swept 1" on remaining entities | sourceface = boundaries 4; targetface = boundaries 3
      size1: Size on entire geometry | hauto = 4

Studies
  std1 "Study 1"
    param: Parametric "Parametric Sweep"
      pname = {t_plate, t_mount}
      plistarr = {10[mm] 12[mm], 10[mm] 15[mm]}
      punit = {, }
    stat: Stationary

Solver configurations
  sol1 "Solution 1" (study std1)
    v1: Variables "Dependent Variables 1"
    s1: Stationary "Stationary Solver 1"
      dDef: Direct
      fc1: FullyCoupled | linsolver = dDef; termonres = auto; reserrfact = 1000
  sol2 "Parametric Solutions 1" (study std1)

Datasets
  dset1: Solution | solution = sol1
  dset2: Solution | solution = sol2

Derived values
  gev1: EvalGlobal "Global Evaluation 1" | data = dset1; table = tbl1; expr = SR
  gev2: EvalGlobal "Global Evaluation 2" | data = dset2; table = tbl2; expr = SR

Tables
  tbl1: Table
    // Global Evaluation 1 (SR)
    Stiffness ratio (1)
    0.406052
  tbl2: Table
    // Global Evaluation 2 (SR)
    t_plate (m) | t_mount (m) | Stiffness ratio (1)
    0.01 | 0.01 | 0.406052
    0.012 | 0.015 | 0.527935

Plots
  pg1: PlotGroup3D "Stress (solid)" | data = dset2
    surf1: Surface | expr = w; unit = µm
      def: Deform "Deformation" | expr = {u, v, w}
  pg2: PlotGroup3D "Stress (solid) 1" | data = dset2
    surf1: Surface | expr = solid.mises
      def: Deform "Deformation" | expr = {u, v, w}