// COMSOL Multiphysics 5.2.0.126 model "thin_film_resistance.mph"
// Thin-Film Resistance
// This example illustrates the technique of approximating a thin layer with a surface in diffusion-type problems, which leads to considerable savings in memory usage. In this example the effect of a thin layer with relatively low conductivity on the potential distribution in a structure is studied. The results show that the thin-layer approximation can be valid even for a layer as thick as 10 percent of the total height of the structure.
// Outline of the model tree

Geometry
  geom1 "Geometry 1" (3D, length unit m)
    wp1: WorkPlane | quickz = 0.1; unite = off
      c1: Circle | pos = {0, 1}; r = 0.6
      sq1: Square | size = 1
      int1: Intersection | input = c1, sq1
      sq2: Square | size = 1
    ext1: Extrude | workplane = wp1; input = wp1.sq2; distance = -0.1
    blk1: Block | pos = {0, 0, -0.1}; size = {1, 1, 0.1}
    mov1: Move (disabled) | input = blk1; displz = -0.02
    blk2: Block (disabled) | pos = {0, 0, -0.02}; size = {1, 1, 0.02}
    fin: Finalize "Form Union"

Physics
  ec: ConductiveMedia "Electric Currents" on all domains
    dependent variable V
    cucn1: CurrentConservation (default) | sigma_mat = userdef; sigma = 1
    ein1: ElectricInsulation (default)
    init1: init "Initial Values 1" (default)
    ncd1: NormalCurrentDensity on boundaries 3 | nJ = 0.3
    gnd1: Ground on boundaries 8
    ci1: ContactImpedance on boundaries 6
      ds = 0.02
      sigmabnd_mat = userdef
      sigmabnd = 1e-2[S/m]
      epsilonrbnd_mat = userdef
      epsilonrbnd = 1
    cucn2: CurrentConservation (disabled) on no domains | sigma_mat = userdef; sigma = 0.01

Mesh
  mesh1 "Mesh 1" (physics-controlled)
    size: MeshSizeDefault | hauto = 5

Studies
  std1 "Study 1"
    stat: Stationary

Solver configurations
  sol1 "Solution 1" (study std1)
    v1: Variables "Dependent Variables 1"
    s1: Stationary "Stationary Solver 1"
      fc1: FullyCoupled | linsolver = i1
      i1: Iterative | linsolver = cg
        mg1: Multigrid | prefun = amg

Datasets
  dset1: Solution | solution = sol1
  cln1: CutLine3D | data = dset1; genpoints = {{0.5, 0.5, -0.1}, {0.5, 0.5, 0.1}}

Plots
  pg1: PlotGroup3D "3D Plot Group 1" | data = dset1
    surf1: Surface | expr = V
  pg2: PlotGroup1D "1D Plot Group 2" | data = dset1
    lngr1: LineGraph | data = cln1; expr = V; xdataexpr = z