// COMSOL Multiphysics 5.2.0.166 model "piezoacoustic_transducer.mph"
// Piezoacoustic Transducer
// modeldescr_aco/piezoacoustic_transducer
// In a phased-array microphone, the piezoelectric crystal plate fits into the structure through a series of stacked layers, which are divided into rows. The space between these layers is referred to as the kerf and the rows are repeated with a periodicity, or pitch. Using functionality provided by the Acoustics Module, this example simulates a single row of such a structure, solving for the acoustic pressure generated by the transducer and the structural deformation due to the electric load.
// Outline of the model tree

Geometry
  geom1 "Geometry 1" (2D axisymmetric, length unit mm)
    c1: Circle | r = 4; angle = 90
    r1: Rectangle | pos = {0, -0.5}; size = {1, 0.5}
    fin: Finalize "Form Union"

Materials
  mat1: Common "Lead Zirconate Titanate (PZT-5H)" on domains 1
    def "Basic"
      heatcapacity = 440[J/(kg*K)]
      thermalconductivity = 1.3[W/(m*K)]
      relpermittivity = diag{1704.4, 1704.4, 1433.6}
      density = 7500[kg/m^3]
    StrainCharge "Strain-charge form"
      sE = {1.65e-011[1/Pa], -4.78e-012[1/Pa], -8.45e-012[1/Pa], 0[1/Pa], 0[1/Pa], 0[1/Pa], -4.78e-012[1/Pa], 1.65e-011[1/Pa], -8.45e-012[1/Pa], 0[1/Pa], 0[1/Pa], 0[1/Pa], -8.45e-012[1/Pa], -8.45e-012[1/Pa], 2.07e-011[1/Pa], 0[1/Pa], 0[1/Pa], 0[1/Pa], 0[1/Pa], 0[1/Pa], 0[1/Pa], 4.35e-011[1/Pa], 0[1/Pa], 0[1/Pa], 0[1/Pa], 0[1/Pa], 0[1/Pa], 0[1/Pa], 4.35e-011[1/Pa], 0[1/Pa], 0[1/Pa], 0[1/Pa], 0[1/Pa], 0[1/Pa], 0[1/Pa], 4.26e-011[1/Pa]}
      dET = {0[C/N], 0[C/N], -2.74e-010[C/N], 0[C/N], 0[C/N], -2.74e-010[C/N], 0[C/N], 0[C/N], 5.93e-010[C/N], 0[C/N], 7.41e-010[C/N], 0[C/N], 7.41e-010[C/N], 0[C/N], 0[C/N], 0[C/N], 0[C/N], 0[C/N]}
      epsilonrT = diag{3130, 3130, 3400}
      eta_sE = {0, 0, 0, 0, 0, 0, 0, 0, 0, 0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}
      eta_dET = {0, 0, 0, 0, 0, 0, 0, 0, 0, 0, 0, 0, 0, 0, 0, 0, 0, 0}
      eta_epsilonT = 0
    StressCharge "Stress-charge form"
      cE = {1.27205e+011[Pa], 8.02122e+010[Pa], 8.46702e+010[Pa], 0[Pa], 0[Pa], 0[Pa], 8.02122e+010[Pa], 1.27205e+011[Pa], 8.46702e+010[Pa], 0[Pa], 0[Pa], 0[Pa], 8.46702e+010[Pa], 8.46702e+010[Pa], 1.17436e+011[Pa], 0[Pa], 0[Pa], 0[Pa], 0[Pa], 0[Pa], 0[Pa], 2.29885e+010[Pa], 0[Pa], 0[Pa], 0[Pa], 0[Pa], 0[Pa], 0[Pa], 2.29885e+010[Pa], 0[Pa], 0[Pa], 0[Pa], 0[Pa], 0[Pa], 0[Pa], 2.34742e+010[Pa]}
      eES = {0[C/m^2], 0[C/m^2], -6.62281[C/m^2], 0[C/m^2], 0[C/m^2], -6.62281[C/m^2], 0[C/m^2], 0[C/m^2], 23.2403[C/m^2], 0[C/m^2], 17.0345[C/m^2], 0[C/m^2], 17.0345[C/m^2], 0[C/m^2], 0[C/m^2], 0[C/m^2], 0[C/m^2], 0[C/m^2]}
      epsilonrS = diag{1704.4, 1704.4, 1433.6}
      eta_cE = {0, 0, 0, 0, 0, 0, 0, 0, 0, 0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}
      eta_eES = {0, 0, 0, 0, 0, 0, 0, 0, 0, 0, 0, 0, 0, 0, 0, 0, 0, 0}
      eta_epsilonS = 0
  mat2: Common "Air" on domains 2
    def "Basic"
      relpermeability = 1
      relpermittivity = 1
      dynamicviscosity = eta(T[1/K])[Pa*s]
      ratioofspecificheat = 1.4
      electricconductivity = 0[S/m]
      heatcapacity = Cp(T[1/K])[J/(kg*K)]
      density = rho(pA[1/Pa],T[1/K])[kg/m^3]
      thermalconductivity = k(T[1/K])[W/(m*K)]
      soundspeed = cs(T[1/K])[m/s]
      eta: Piecewise | arg = T; extrap = constant; pieces = {200.0, 1600.0, -8.38278E-7+8.35717342E-8*T^1-7.69429583E-11*T^2+4.6437266E-14*T^3-1.06585607E-17*T^4}
      Cp: Piecewise | arg = T; extrap = constant; pieces = {200.0, 1600.0, 1047.63657-0.372589265*T^1+9.45304214E-4*T^2-6.02409443E-7*T^3+1.2858961E-10*T^4}
      rho: Analytic | expr = pA*0.02897/8.314/T; args = {pA, T}; dermethod = manual; argders = {{pA, d(pA*0.02897/8.314/T,pA)}, {T, d(pA*0.02897/8.314/T,T)}}
      k: Piecewise | arg = T; extrap = constant; pieces = {200.0, 1600.0, -0.00227583562+1.15480022E-4*T^1-7.90252856E-8*T^2+4.11702505E-11*T^3-7.43864331E-15*T^4}
      cs: Analytic | expr = sqrt(1.4*287*T); args = T; dermethod = manual; argders = {T, d(sqrt(1.4*287*T),T)}
    RefractiveIndex
      n = 1
      ki = 0

Physics
  acpr: PressureAcoustics "Pressure Acoustics, Frequency Domain" on domains 2
    dependent variable p
    fpam1: FrequencyPressureAcousticsModel "Pressure Acoustics 1" (default)
    axi1: AxialSymmetry (default)
    shb1: SoundHard "Sound Hard Boundary (Wall) 1" (default)
    init1: init "Initial Values 1" (default)
    swr1: SphericalWaveRadiation on boundaries 7
    ffc1: FarFieldCalculation on boundaries 7 | SymmetryInPlane0 = 1
  solid: SolidMechanics on domains 1
    dependent variable u = {u, v, w}
    lemm1: LinearElasticModel "Linear Elastic Material 1" (default)
    axi1: AxialSymmetrySolid "Axial Symmetry 1" (default)
    free1: Free (default)
    init1: init "Initial Values 1" (default)
    pzm1: PiezoelectricMaterialModel "Piezoelectric Material 1" on all domains
    roll1: Roller on boundaries 2
  es: Electrostatics on domains 1
    dependent variable V
    ccn1: ChargeConservation (default)
    axi1: AxialSymmetry (default)
    zc1: ZeroCharge (default)
    init1: init "Initial Values 1" (default)
    ccnp1: ChargeConservationPiezo "Charge Conservation, Piezoelectric 1" on all domains
    gnd1: Ground on boundaries 2
    pot1: ElectricPotential on boundaries 4 | V0 = 100

Multiphysics
  asb1: AcousticStructureBoundary on boundaries 4 | Acoustics_physics = acpr; Structure_physics = solid
  pze1: PiezoelectricEffect on all domains | Solid_physics = solid; Electrostatics_physics = es

Mesh
  mesh1 "Mesh 1"
    size: MeshSizeDefault | hmax = 0.2; hauto = 5; custom = on
    ftri1: FreeTri "Free Triangular 1" on remaining entities
      size1: Size on domains 1 | hmax = 0.05; hauto = 5; custom = on

Studies
  std1 "Study 1"
    freq: Frequency "Frequency Domain" | punit = Hz; plist = 200[kHz]

Solver configurations
  sol1 "Solution 1" (study std1)
    v1: Variables "Dependent Variables 1"
    s1: Stationary "Stationary Solver 1" | stol = 0.001
      dDef: Direct
      p1: Parametric | pname = freq; plistarr = 200[kHz]; punit = Hz; pcontinuationmode = no
      fc1: FullyCoupled | linsolver = dDef; termonres = auto; reserrfact = 1000

Datasets
  dset1: Solution | solution = sol1
  rev1: Revolve2D "Revolution 2D 1" | data = dset1; genpoints = {{0, 0}, {0, 1}}; startangle = -90; revangle = 225
  farf1: Solution | solution = sol1
  rev2: Revolve2D "Revolution 2D 2" | data = dset1; genpoints = {{0, 0}, {0, 1}}; startangle = -90; revangle = 225
  rev3: Revolve2D "Revolution 2D 3"
    data = dset1
    genpoints = {{0, 0}, {0, 1}}
    spacevars = {rev1x, rev1y, rev1z}
    anglevar = rev1phi

Plots
  pg1: PlotGroup2D "Acoustic Pressure (acpr)" | data = dset1
    surf1: Surface | expr = acpr.p_t
      hght1: Height "Height Expression 1" | expr = acpr.p_t
  pg2: PlotGroup2D "Sound Pressure Level (acpr)" | data = dset1
    surf1: Surface | expr = acpr.Lp
  pg3: PlotGroup3D "Acoustic Pressure, 3D (acpr)" | data = rev1
    surf1: Surface | expr = acpr.p_t
  pg4: PlotGroup3D "Sound Pressure Level, 3D (acpr)" | data = rev1
    surf1: Surface | expr = acpr.Lp
  pg5: PolarGroup "Far-Field Sound Pressure Level (acpr)" | data = farf1
    ff1: FarField | expr = acpr.ffc1.Lp_pfar; anglerestr = manual; phimin = -90; phirange = 180
  pg6: PolarGroup "Far-Field Pressure (acpr)" | data = farf1
    ff1: FarField | expr = acpr.ffc1.pfar; anglerestr = manual; phimin = -90; phirange = 180
  pg7: PlotGroup2D "Stress (solid)" | data = dset1
    surf1: Surface | expr = solid.mises
      def: Deform "Deformation" | expr = {u, w}
  pg8: PlotGroup3D "Stress, 3D (solid)" | data = rev2
    surf1: Surface | expr = solid.mises
      def: Deform "Deformation" | expr = {cos(rev2phi)*u, sin(rev2phi)*u, w}; descr = Displacement field (Material)
  pg9: PlotGroup2D "Electric Potential (es)" | data = dset1
    surf1: Surface | expr = V; constUnit = {m, m, m}
  pg10: PlotGroup3D "Electric Potential, Revolved Geometry (es)" | data = rev3
    surf1: Surface | expr = V; constUnit = {m, m, m}
  pg11: PlotGroup2D "Displacement" | data = dset1
    surf1: Surface | expr = solid.disp
      def1: Deform "Deformation 1" | expr = {u, w}
  pg12: PlotGroup1D "von Mises Stress" | data = dset1; title = von Mises stress; xlabel = r (mm); ylabel = Stress (Pa)
    lngr1: LineGraph on boundaries 4 | expr = solid.mises; xdata = expr; xdataexpr = r
  pg13: PlotGroup1D "Pressure" | data = dset1; title = Pressure; xlabel = r (mm); ylabel = p (Pa)
    lngr1: LineGraph on boundaries 4 | expr = acpr.p_t; xdata = expr; xdataexpr = r
  pg14: PlotGroup2D "2D Plot Group 14" | data = dset1; solutionintitle = off; xlabel = r[mm]; ylabel = z[mm]
    surf1: Surface | expr = p
    arws1: ArrowSurface | expr = {acpr.ar, acpr.az}
    con1: Contour | expr = acpr.Lp
    surf2: Surface | expr = solid.mises
      def1: Deform "Deformation 1" | expr = {u, w}